#ifmissing "123.glm"
#model get IEEE/123
#endif
#include "123.glm"

// Task 1 - set the clock
clock
{
    timezone America/Arizona/Phoenix;
    starttime "2020-01-01 12:00:00 MST";
    stoptime "2021-01-01 12:00:00 MST";
}

// Task 2 - Load weather data
#ifmissing "AZ-Phoenix_Sky_Harbor_Intl_Ap.tmy3"
#weather get AZ-Phoenix_Sky_Harbor_Intl_Ap.tmy3
#endif
#input "AZ-Phoenix_Sky_Harbor_Intl_Ap.tmy3"


#output "IEEE-123-voltage-profile.png" -t profile -l 10
